*Heading
** Job name: Smooth Model name: Smooth
** Generated by: Abaqus/CAE 6.14-6
*Preprint, echo=NO, model=NO, history=NO, contact=NO
**
** PARTS
**
*Part, name=Specimen
*Node
1,-37.2728233,-0.00206456473,1.60000002
2,-37.2728233,-0.00206456473,0.
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*Element, type=C3D8
1,234,2465,5990,1535,1,21,605,112
2,2465,2466,5991,5990,21,22,606,605
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*Nset, nset=All, generate
1,21964,1
*Elset, elset=All, generate
1,19200,1
** Section: Specimen
*Solid Section, elset=All, material=Steel
,
*End Part
**
**
** ASSEMBLY
**
*Assembly, name=Assembly
**
*Instance, name=Specimen, part=Specimen
1.35,40.,2.50000000000001
1.35,40.,2.50000000000001,0.77264972044796,39.422649720448,3.07735027955205,119.999999109416
*End Instance
**
*Nset, nset=Trim, instance=Specimen
13,14,15,16,17,18
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*Elset, elset=Trim, instance=Specimen, generate
15105,19200,1
*Nset, nset=Ysymm, instance=Specimen
17,18,19,20,485,486
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*Elset, elset=Ysymm, instance=Specimen, generate
18945,19200,1
*Nset, nset=Zsymm, instance=Specimen
5,6,7,8,11,12
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*Elset, elset=Zsymm, instance=Specimen
7681,7682,7683,7684,7685,7686
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*Elset, elset=_ActiveZone_S4, internal, instance=Specimen, generate
15120,19200,16
*Surface, type=ELEMENT, name=ActiveZone
_ActiveZone_S4, S4
*Elset, elset=_Load_S6, internal, instance=Specimen, generate
8193,14823,26
*Surface, type=ELEMENT, name=Load
_Load_S6, S6
*End Assembly
**
** MATERIALS
**
*Material, name=Steel
*Elastic
209000.,0.3
*Plastic
0.01,0.
1.,6.54e-15
2.,1.67e-13
3.,1.12e-12
4.,4.29e-12
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1000.,0.711985
**
** BOUNDARY CONDITIONS
**
** Name: Ysymm Type: Symmetry/Antisymmetry/Encastre
*Boundary
Ysymm, YSYMM
** Name: Zsymm Type: Symmetry/Antisymmetry/Encastre
*Boundary
Zsymm, ZSYMM
**
**-----------------------------------------------------------
**
*Step, name=Step-1, nlgeom=NO
*Static
1.,1.,1e-05,1.
*Dsload
Load,TRVEC,1.40625, 0.,1.,0.
*EL PRINT, POSITION=AVERAGED AT NODES, elset=Trim, FREQUENCY=99999
EE
*EL PRINT, POSITION=AVERAGED AT NODES, elset=Trim, FREQUENCY=99999
PE
*Output, field, variable=PRESELECT
*End Step
**
**-----------------------------------------------------------
**
*Step, name=Step-2, nlgeom=NO
*Static
1.,1.,1e-05,1.
*Dsload
Load,TRVEC,2.8125, 0.,1.,0.
*EL PRINT, POSITION=AVERAGED AT NODES, elset=Trim, FREQUENCY=99999
EE
*EL PRINT, POSITION=AVERAGED AT NODES, elset=Trim, FREQUENCY=99999
PE
*Output, field, variable=PRESELECT
*End Step
**
**-----------------------------------------------------------
**
*Step, name=Step-3, nlgeom=NO
*Static
1.,1.,1e-05,1.
*Dsload
Load,TRVEC,4.21875, 0.,1.,0.
*EL PRINT, POSITION=AVERAGED AT NODES, elset=Trim, FREQUENCY=99999
EE
*EL PRINT, POSITION=AVERAGED AT NODES, elset=Trim, FREQUENCY=99999
PE
*Output, field, variable=PRESELECT
*End Step
**
**-----------------------------------------------------------
**
*Step, name=Step-4, nlgeom=NO
*Static
1.,1.,1e-05,1.
*Dsload
Load,TRVEC,5.625, 0.,1.,0.
*EL PRINT, POSITION=AVERAGED AT NODES, elset=Trim, FREQUENCY=99999
EE
*EL PRINT, POSITION=AVERAGED AT NODES, elset=Trim, FREQUENCY=99999
PE
*Output, field, variable=PRESELECT
*End Step
**
**-----------------------------------------------------------
**
*Step, name=Step-5, nlgeom=NO
*Static
1.,1.,1e-05,1.
*Dsload
Load,TRVEC,7.03125, 0.,1.,0.
*EL PRINT, POSITION=AVERAGED AT NODES, elset=Trim, FREQUENCY=99999
EE
*EL PRINT, POSITION=AVERAGED AT NODES, elset=Trim, FREQUENCY=99999
PE
*Output, field, variable=PRESELECT
*End Step
**
**-----------------------------------------------------------
**
*Step, name=Step-6, nlgeom=NO
*Static
1.,1.,1e-05,1.
*Dsload
Load,TRVEC,8.4375, 0.,1.,0.
*EL PRINT, POSITION=AVERAGED AT NODES, elset=Trim, FREQUENCY=99999
EE
*EL PRINT, POSITION=AVERAGED AT NODES, elset=Trim, FREQUENCY=99999
PE
*Output, field, variable=PRESELECT
*End Step
**
**-----------------------------------------------------------
**
*Step, name=Step-7, nlgeom=NO
*Static
1.,1.,1e-05,1.
*Dsload
Load,TRVEC,9.84375, 0.,1.,0.
*EL PRINT, POSITION=AVERAGED AT NODES, elset=Trim, FREQUENCY=99999
EE
*EL PRINT, POSITION=AVERAGED AT NODES, elset=Trim, FREQUENCY=99999
PE
*Output, field, variable=PRESELECT
*End Step
**
**-----------------------------------------------------------
**
*Step, name=Step-8, nlgeom=NO
*Static
1.,1.,1e-05,1.
*Dsload
Load,TRVEC,11.25, 0.,1.,0.
*EL PRINT, POSITION=AVERAGED AT NODES, elset=Trim, FREQUENCY=99999
EE
*EL PRINT, POSITION=AVERAGED AT NODES, elset=Trim, FREQUENCY=99999
PE
*Output, field, variable=PRESELECT
*End Step
**
**-----------------------------------------------------------
**
*Step, name=Step-9, nlgeom=NO
*Static
1.,1.,1e-05,1.
*Dsload
Load,TRVEC,12.65625, 0.,1.,0.
*EL PRINT, POSITION=AVERAGED AT NODES, elset=Trim, FREQUENCY=99999
EE
*EL PRINT, POSITION=AVERAGED AT NODES, elset=Trim, FREQUENCY=99999
PE
*Output, field, variable=PRESELECT
*End Step
**
**-----------------------------------------------------------
**
*Step, name=Step-10, nlgeom=NO
*Static
1.,1.,1e-05,1.
*Dsload
Load,TRVEC,14.0625, 0.,1.,0.
*EL PRINT, POSITION=AVERAGED AT NODES, elset=Trim, FREQUENCY=99999
EE
*EL PRINT, POSITION=AVERAGED AT NODES, elset=Trim, FREQUENCY=99999
PE
*Output, field, variable=PRESELECT
*End Step
**
**-----------------------------------------------------------
**
*Step, name=Step-11, nlgeom=NO
*Static
1.,1.,1e-05,1.
*Dsload
Load,TRVEC,15.468750000000002, 0.,1.,0.
*EL PRINT, POSITION=AVERAGED AT NODES, elset=Trim, FREQUENCY=99999
EE
*EL PRINT, POSITION=AVERAGED AT NODES, elset=Trim, FREQUENCY=99999
PE
*Output, field, variable=PRESELECT
*End Step
**
**-----------------------------------------------------------
**
*Step, name=Step-12, nlgeom=NO
*Static
1.,1.,1e-05,1.
*Dsload
Load,TRVEC,16.875, 0.,1.,0.
*EL PRINT, POSITION=AVERAGED AT NODES, elset=Trim, FREQUENCY=99999
EE
*EL PRINT, POSITION=AVERAGED AT NODES, elset=Trim, FREQUENCY=99999
PE
*Output, field, variable=PRESELECT
*End Step
**
**-----------------------------------------------------------
**
*Step, name=Step-13, nlgeom=NO
*Static
1.,1.,1e-05,1.
*Dsload
Load,TRVEC,18.28125, 0.,1.,0.
*EL PRINT, POSITION=AVERAGED AT NODES, elset=Trim, FREQUENCY=99999
EE
*EL PRINT, POSITION=AVERAGED AT NODES, elset=Trim, FREQUENCY=99999
PE
*Output, field, variable=PRESELECT
*End Step
**
**-----------------------------------------------------------
**
*Step, name=Step-14, nlgeom=NO
*Static
1.,1.,1e-05,1.
*Dsload
Load,TRVEC,19.6875, 0.,1.,0.
*EL PRINT, POSITION=AVERAGED AT NODES, elset=Trim, FREQUENCY=99999
EE
*EL PRINT, POSITION=AVERAGED AT NODES, elset=Trim, FREQUENCY=99999
PE
*Output, field, variable=PRESELECT
*End Step
**
**-----------------------------------------------------------
**
*Step, name=Step-15, nlgeom=NO
*Static
1.,1.,1e-05,1.
*Dsload
Load,TRVEC,21.09375, 0.,1.,0.
*EL PRINT, POSITION=AVERAGED AT NODES, elset=Trim, FREQUENCY=99999
EE
*EL PRINT, POSITION=AVERAGED AT NODES, elset=Trim, FREQUENCY=99999
PE
*Output, field, variable=PRESELECT
*End Step
**
**-----------------------------------------------------------
**
*Step, name=Step-16, nlgeom=NO
*Static
1.,1.,1e-05,1.
*Dsload
Load,TRVEC,22.5, 0.,1.,0.
*EL PRINT, POSITION=AVERAGED AT NODES, elset=Trim, FREQUENCY=99999
EE
*EL PRINT, POSITION=AVERAGED AT NODES, elset=Trim, FREQUENCY=99999
PE
*Output, field, variable=PRESELECT
*End Step
**
**-----------------------------------------------------------
**
*Step, name=Step-17, nlgeom=NO
*Static
1.,1.,1e-05,1.
*Dsload
Load,TRVEC,23.90625, 0.,1.,0.
*EL PRINT, POSITION=AVERAGED AT NODES, elset=Trim, FREQUENCY=99999
EE
*EL PRINT, POSITION=AVERAGED AT NODES, elset=Trim, FREQUENCY=99999
PE
*Output, field, variable=PRESELECT
*End Step
**
**-----------------------------------------------------------
**
*Step, name=Step-18, nlgeom=NO
*Static
1.,1.,1e-05,1.
*Dsload
Load,TRVEC,25.3125, 0.,1.,0.
*EL PRINT, POSITION=AVERAGED AT NODES, elset=Trim, FREQUENCY=99999
EE
*EL PRINT, POSITION=AVERAGED AT NODES, elset=Trim, FREQUENCY=99999
PE
*Output, field, variable=PRESELECT
*End Step
**
**-----------------------------------------------------------
**
*Step, name=Step-19, nlgeom=NO
*Static
1.,1.,1e-05,1.
*Dsload
Load,TRVEC,26.71875, 0.,1.,0.
*EL PRINT, POSITION=AVERAGED AT NODES, elset=Trim, FREQUENCY=99999
EE
*EL PRINT, POSITION=AVERAGED AT NODES, elset=Trim, FREQUENCY=99999
PE
*Output, field, variable=PRESELECT
*End Step
**
**-----------------------------------------------------------
**
*Step, name=Step-20, nlgeom=NO
*Static
1.,1.,1e-05,1.
*Dsload
Load,TRVEC,28.125, 0.,1.,0.
*EL PRINT, POSITION=AVERAGED AT NODES, elset=Trim, FREQUENCY=99999
EE
*EL PRINT, POSITION=AVERAGED AT NODES, elset=Trim, FREQUENCY=99999
PE
*Output, field, variable=PRESELECT
*End Step
**
**-----------------------------------------------------------
**
*Step, name=Step-21, nlgeom=NO
*Static
1.,1.,1e-05,1.
*Dsload
Load,TRVEC,29.53125, 0.,1.,0.
*EL PRINT, POSITION=AVERAGED AT NODES, elset=Trim, FREQUENCY=99999
EE
*EL PRINT, POSITION=AVERAGED AT NODES, elset=Trim, FREQUENCY=99999
PE
*Output, field, variable=PRESELECT
*End Step
**
**-----------------------------------------------------------
**
*Step, name=Step-22, nlgeom=NO
*Static
1.,1.,1e-05,1.
*Dsload
Load,TRVEC,30.937500000000004, 0.,1.,0.
*EL PRINT, POSITION=AVERAGED AT NODES, elset=Trim, FREQUENCY=99999
EE
*EL PRINT, POSITION=AVERAGED AT NODES, elset=Trim, FREQUENCY=99999
PE
*Output, field, variable=PRESELECT
*End Step
**
**-----------------------------------------------------------
**
*Step, name=Step-23, nlgeom=NO
*Static
1.,1.,1e-05,1.
*Dsload
Load,TRVEC,32.34374999999999, 0.,1.,0.
*EL PRINT, POSITION=AVERAGED AT NODES, elset=Trim, FREQUENCY=99999
EE
*EL PRINT, POSITION=AVERAGED AT NODES, elset=Trim, FREQUENCY=99999
PE
*Output, field, variable=PRESELECT
*End Step
**
**-----------------------------------------------------------
**
*Step, name=Step-24, nlgeom=NO
*Static
1.,1.,1e-05,1.
*Dsload
Load,TRVEC,33.75, 0.,1.,0.
*EL PRINT, POSITION=AVERAGED AT NODES, elset=Trim, FREQUENCY=99999
EE
*EL PRINT, POSITION=AVERAGED AT NODES, elset=Trim, FREQUENCY=99999
PE
*Output, field, variable=PRESELECT
*End Step
**
**-----------------------------------------------------------
**
*Step, name=Step-25, nlgeom=NO
*Static
1.,1.,1e-05,1.
*Dsload
Load,TRVEC,35.15625, 0.,1.,0.
*EL PRINT, POSITION=AVERAGED AT NODES, elset=Trim, FREQUENCY=99999
EE
*EL PRINT, POSITION=AVERAGED AT NODES, elset=Trim, FREQUENCY=99999
PE
*Output, field, variable=PRESELECT
*End Step
**
**-----------------------------------------------------------
**
*Step, name=Step-26, nlgeom=NO
*Static
1.,1.,1e-05,1.
*Dsload
Load,TRVEC,36.5625, 0.,1.,0.
*EL PRINT, POSITION=AVERAGED AT NODES, elset=Trim, FREQUENCY=99999
EE
*EL PRINT, POSITION=AVERAGED AT NODES, elset=Trim, FREQUENCY=99999
PE
*Output, field, variable=PRESELECT
*End Step
**
**-----------------------------------------------------------
**
*Step, name=Step-27, nlgeom=NO
*Static
1.,1.,1e-05,1.
*Dsload
Load,TRVEC,37.96875, 0.,1.,0.
*EL PRINT, POSITION=AVERAGED AT NODES, elset=Trim, FREQUENCY=99999
EE
*EL PRINT, POSITION=AVERAGED AT NODES, elset=Trim, FREQUENCY=99999
PE
*Output, field, variable=PRESELECT
*End Step
**
**-----------------------------------------------------------
**
*Step, name=Step-28, nlgeom=NO
*Static
1.,1.,1e-05,1.
*Dsload
Load,TRVEC,39.375, 0.,1.,0.
*EL PRINT, POSITION=AVERAGED AT NODES, elset=Trim, FREQUENCY=99999
EE
*EL PRINT, POSITION=AVERAGED AT NODES, elset=Trim, FREQUENCY=99999
PE
*Output, field, variable=PRESELECT
*End Step
**
**-----------------------------------------------------------
**
*Step, name=Step-29, nlgeom=NO
*Static
1.,1.,1e-05,1.
*Dsload
Load,TRVEC,40.78125, 0.,1.,0.
*EL PRINT, POSITION=AVERAGED AT NODES, elset=Trim, FREQUENCY=99999
EE
*EL PRINT, POSITION=AVERAGED AT NODES, elset=Trim, FREQUENCY=99999
PE
*Output, field, variable=PRESELECT
*End Step
**
**-----------------------------------------------------------
**
*Step, name=Step-30, nlgeom=NO
*Static
1.,1.,1e-05,1.
*Dsload
Load,TRVEC,42.1875, 0.,1.,0.
*EL PRINT, POSITION=AVERAGED AT NODES, elset=Trim, FREQUENCY=99999
EE
*EL PRINT, POSITION=AVERAGED AT NODES, elset=Trim, FREQUENCY=99999
PE
*Output, field, variable=PRESELECT
*End Step
**
**-----------------------------------------------------------
**
*Step, name=Step-31, nlgeom=NO
*Static
1.,1.,1e-05,1.
*Dsload
Load,TRVEC,43.59375, 0.,1.,0.
*EL PRINT, POSITION=AVERAGED AT NODES, elset=Trim, FREQUENCY=99999
EE
*EL PRINT, POSITION=AVERAGED AT NODES, elset=Trim, FREQUENCY=99999
PE
*Output, field, variable=PRESELECT
*End Step
**
**-----------------------------------------------------------
**
*Step, name=Step-32, nlgeom=NO
*Static
1.,1.,1e-05,1.
*Dsload
Load,TRVEC,45., 0.,1.,0.
*EL PRINT, POSITION=AVERAGED AT NODES, elset=Trim, FREQUENCY=99999
EE
*EL PRINT, POSITION=AVERAGED AT NODES, elset=Trim, FREQUENCY=99999
PE
*Output, field, variable=PRESELECT
*End Step
**
**-----------------------------------------------------------
**
*Step, name=Step-33, nlgeom=NO
*Static
1.,1.,1e-05,1.
*Dsload
Load,TRVEC,46.40625, 0.,1.,0.
*EL PRINT, POSITION=AVERAGED AT NODES, elset=Trim, FREQUENCY=99999
EE
*EL PRINT, POSITION=AVERAGED AT NODES, elset=Trim, FREQUENCY=99999
PE
*Output, field, variable=PRESELECT
*End Step
**
**-----------------------------------------------------------
**
*Step, name=Step-34, nlgeom=NO
*Static
1.,1.,1e-05,1.
*Dsload
Load,TRVEC,47.8125, 0.,1.,0.
*EL PRINT, POSITION=AVERAGED AT NODES, elset=Trim, FREQUENCY=99999
EE
*EL PRINT, POSITION=AVERAGED AT NODES, elset=Trim, FREQUENCY=99999
PE
*Output, field, variable=PRESELECT
*End Step
**
**-----------------------------------------------------------
**
*Step, name=Step-35, nlgeom=NO
*Static
1.,1.,1e-05,1.
*Dsload
Load,TRVEC,49.21875, 0.,1.,0.
*EL PRINT, POSITION=AVERAGED AT NODES, elset=Trim, FREQUENCY=99999
EE
*EL PRINT, POSITION=AVERAGED AT NODES, elset=Trim, FREQUENCY=99999
PE
*Output, field, variable=PRESELECT
*End Step
**
**-----------------------------------------------------------
**
*Step, name=Step-36, nlgeom=NO
*Static
1.,1.,1e-05,1.
*Dsload
Load,TRVEC,50.625, 0.,1.,0.
*EL PRINT, POSITION=AVERAGED AT NODES, elset=Trim, FREQUENCY=99999
EE
*EL PRINT, POSITION=AVERAGED AT NODES, elset=Trim, FREQUENCY=99999
PE
*Output, field, variable=PRESELECT
*End Step
**
**-----------------------------------------------------------
**
*Step, name=Step-37, nlgeom=NO
*Static
1.,1.,1e-05,1.
*Dsload
Load,TRVEC,52.03125, 0.,1.,0.
*EL PRINT, POSITION=AVERAGED AT NODES, elset=Trim, FREQUENCY=99999
EE
*EL PRINT, POSITION=AVERAGED AT NODES, elset=Trim, FREQUENCY=99999
PE
*Output, field, variable=PRESELECT
*End Step
**
**-----------------------------------------------------------
**
*Step, name=Step-38, nlgeom=NO
*Static
1.,1.,1e-05,1.
*Dsload
Load,TRVEC,53.4375, 0.,1.,0.
*EL PRINT, POSITION=AVERAGED AT NODES, elset=Trim, FREQUENCY=99999
EE
*EL PRINT, POSITION=AVERAGED AT NODES, elset=Trim, FREQUENCY=99999
PE
*Output, field, variable=PRESELECT
*End Step
**
**-----------------------------------------------------------
**
*Step, name=Step-39, nlgeom=NO
*Static
1.,1.,1e-05,1.
*Dsload
Load,TRVEC,54.84375, 0.,1.,0.
*EL PRINT, POSITION=AVERAGED AT NODES, elset=Trim, FREQUENCY=99999
EE
*EL PRINT, POSITION=AVERAGED AT NODES, elset=Trim, FREQUENCY=99999
PE
*Output, field, variable=PRESELECT
*End Step
**
**-----------------------------------------------------------
**
*Step, name=Step-40, nlgeom=NO
*Static
1.,1.,1e-05,1.
*Dsload
Load,TRVEC,56.25, 0.,1.,0.
*EL PRINT, POSITION=AVERAGED AT NODES, elset=Trim, FREQUENCY=99999
EE
*EL PRINT, POSITION=AVERAGED AT NODES, elset=Trim, FREQUENCY=99999
PE
*Output, field, variable=PRESELECT
*End Step
